Clear

New Object=Circuit.TNB_DUMA BasekV=33 pu=1.0 Angle=0 phases=3 bus1=PPU_DUMA_33kV BaseFreq=5

// Sectionalized Condition

Redirect tx_sectionalized.dss
Redirect lines_sectionalized.dss

// Parallel condition
// Redirect transformer.dss
// Redirect lines.dss

// Loads
Redirect peak_loads.dss

// Redirect Solar PV Penetration Level

Redirect pv120pc.dss
// Redirect pv140pc.dss
// Redirect pv160pc.dss
// Redirect pv180pc.dss
// Redirect pv200pc.dss

set defaultbasefreq=50
